# 1.Расчет двигателя
m := 20  # кг  # масса робота
g := 9.8
V := 1.25  # м/c  скорость движения
D := 97  # мм  # диаметр колеса
fk := 0.02  # коэффициентр трения качения
η_пер := 0.97  # КПД цилиндрический зубчатая передача
R := D/(2*1000)
R = 0.0485
Fk := fk*m*g/R  # сила трения качения
Tko := Fk*R/2
# необходимый момент для одного колеса
Tko = 1.96  # Н/м
n_к := V*60/(2*π*R)
# частота вращения колеса
n_к = 246.116  # об/мин
k := 1.5  # коэффициент безопастности
P := Tko*n_к*2*3.14*k/60
P = 75.7348
# CHIHAI MOTOR
# CHP-42GP-775 ABHL
# Напряжение: 24 В
# номинальный момент: 3 Н/м
# номинальныя частота вращения выходного вала: 250 об/мин
# номинальный ток: 9 А
Pдв := 3*250*2*3.14/60
Pдв = 78.5
Pдв > P  # двигатель
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